// SBML level 3 version 2
// dcterms:bibliographicCitation: http://identifiers.org/pubmed/29652855

function Function_for_Reaction_2_1(I, T, r_T_Tmax)
  r_T_Tmax*T/(T + I);
end

function Function_for_Reaction_8_1(I, pstar)
  pstar*I;
end

function Function_for_Reaction_5_1(I, R, T, r_T_Tmax)
  1/(1 + R)*(r_T_Tmax*I/(T + I));
end

function Function_for_Reaction_6_1(I, R, r_T_d)
  1/(1 + R)*r_T_d*I;
end

function Function_for_Reaction_7_1(D, I, r_T_d)
  D*r_T_d*I;
end

function Function_for_Reaction_1_1(I, s)
  s*I;
end

model New_Model()
  // Aston2018 - Dynamics of Hepatitis C Infection
  // biomodels.db:MODEL1808280002
  // biomodels.db:BIOMD0000000713
  // hasProperty efo:0003047
  // hasProperty mamo:MAMO_0000046
  // hasTaxon taxonomy:9606
  // hasTaxon taxonomy:11103
  // model units - substance: substance, time: time, volume: volume, area: area, length: length, extent: substance

  // Compartments:
  compartment compartment = 1 volume; compartment is "Liver";  // BTO:0000759

  // Species:
  species T in compartment = 17755; T is "Healthy Hepatocytes (T)";  // isVersionOf BTO:0000575
  species I in compartment = 1452300; I is "Infected Hepatocytes (I)";  // BTO:0000152; isVersionOf BTO:0000575
  species V in compartment = 0; V is "Viral Load (V)";  // hasTaxon taxonomy:11103; hasTaxon taxonomy:11103

  // Parameters:
  s = 0.004626;
  r_T_Tmax = 1292000;
  r_T_d = 0.038518;
  R = 2.6011;
  D = 1.1064;
  beta = 1.9493e-7; beta is "beta*";
  pstar = 0.034868;
  c = 0.00027784;

  // Reactions:
  Reaction_1: => T; compartment*Function_for_Reaction_1_1(I, s); Reaction_1 is "Proliferation of hepatocytes from liver stem cells";  // modifiers: I
  Reaction_2: => T; compartment*Function_for_Reaction_2_1(I, T, r_T_Tmax); Reaction_2 is "Proliferation of hepatocytes through cell division";  // modifiers: I
  Death_of_healthy_hepatocytes: T => ; compartment*r_T_d*T;
  Infection_of_healthy_hepatocytes: T + V => I; compartment*beta*T*V;  // isVersionOf ncit:c128320
  Reaction_5: => I; compartment*Function_for_Reaction_5_1(I, R, T, r_T_Tmax); Reaction_5 is "Proliferation of infected hepatocytes";  // modifiers: T
  Reaction_6: I => ; compartment*Function_for_Reaction_6_1(I, R, r_T_d); Reaction_6 is "Death of infected hepatocytes (1st term)";
  Reaction_7: I => ; compartment*Function_for_Reaction_7_1(D, I, r_T_d); Reaction_7 is "Death of Infected Hepatocytes (2nd term)";
  Release_of_the_virus: => V; compartment*Function_for_Reaction_8_1(I, pstar);  // modifiers: I; isVersionOf GO:0019076
  Degradation_of_the_virus: V => ; compartment*c*V;

  // Unit definitions:
  unit length = metre;
  unit area = metre^2;
  unit volume = 1e-3 litre;
  unit time = 86400 second;
  unit substance = mole;
end
