// SBML level 3 version 2
// dcterms:bibliographicCitation: http://identifiers.org/pubmed/29652855

function Function_for_Reaction_1_1(I, s)
  s*I;
end

function Function_for_Reaction_8_1(I, pstar)
  pstar*I;
end

function Function_for_Reaction_7_1(D, I, r_T_d)
  D*r_T_d*I;
end

function Function_for_Reaction_2_1(I, T, r_T_Tmax)
  r_T_Tmax*T/(T + I);
end

function Function_for_Reaction_5_1(I, R, T, r_T_Tmax)
  1/(1 + R)*(r_T_Tmax*I/(T + I));
end

function Function_for_Reaction_6_1(I, R, r_T_d)
  1/(1 + R)*r_T_d*I;
end

model New_Model()
  // Aston2018 - Dynamics of Hepatitis C Infection
  // biomodels.db:BIOMD0000000713
  // biomodels.db:MODEL1808280002
  // hasProperty efo:0003047
  // hasProperty mamo:MAMO_0000046
  // hasTaxon taxonomy:9606
  // hasTaxon taxonomy:11103
  // model units - substance: substance, time: time, volume: volume, area: area, length: length, extent: substance

  // Compartments:
  compartment compartment = 1 volume; compartment is "Liver";  // BTO:0000759

  // Species:
  species T in compartment = 8293500; T is "Healthy Hepatocytes (T)";  // isVersionOf BTO:0000575
  species I in compartment = 9588; I is "Infected Hepatocytes (I)";  // BTO:0000152; isVersionOf BTO:0000575
  species V in compartment = 0; V is "Viral Load (V)";  // hasTaxon taxonomy:11103; hasTaxon taxonomy:11103

  // Parameters:
  s = 0.1178;
  r_T_Tmax = 10645;
  r_T_d = 0.0019927;
  R = 30.078;
  D = 58.954;
  beta = 8.3376e-9; beta is "beta*";
  pstar = 203.96;
  c = 17.908;

  // Reactions:
  Reaction_1: => T; compartment*Function_for_Reaction_1_1(I, Reaction_1_s); Reaction_1 is "Proliferation of hepatocytes from liver stem cells";  // modifiers: I
    Reaction_1_s = 0.00015104;
  Reaction_2: => T; compartment*Function_for_Reaction_2_1(I, T, Reaction_2_r_T_Tmax); Reaction_2 is "Proliferation of hepatocytes through cell division";  // modifiers: I
    Reaction_2_r_T_Tmax = 28556;
  Death_of_healthy_hepatocytes: T => ; compartment*Death_of_healthy_hepatocytes_k1*T;
    Death_of_healthy_hepatocytes_k1 = 0.002989;
  Infection_of_healthy_hepatocytes: T + V => I; compartment*Infection_of_healthy_hepatocytes_k1*T*V;  // isVersionOf ncit:c128320
    Infection_of_healthy_hepatocytes_k1 = 7.1149e-9;
  Reaction_5: => I; compartment*Function_for_Reaction_5_1(I, Reaction_5_R, T, Reaction_5_r_T_Tmax); Reaction_5 is "Proliferation of infected hepatocytes";  // modifiers: T
    Reaction_5_R = 1168.6; Reaction_5_r_T_Tmax = 28556;
  Reaction_6: I => ; compartment*Function_for_Reaction_6_1(I, Reaction_6_R, Reaction_6_r_T_d); Reaction_6 is "Death of infected hepatocytes (1st term)";
    Reaction_6_R = 1168.6; Reaction_6_r_T_d = 0.002989;
  Reaction_7: I => ; compartment*Function_for_Reaction_7_1(Reaction_7_D, I, Reaction_7_r_T_d); Reaction_7 is "Death of Infected Hepatocytes (2nd term)";
    Reaction_7_D = 573.02; Reaction_7_r_T_d = 0.002989;
  Release_of_the_virus: => V; compartment*Function_for_Reaction_8_1(I, Release_of_the_virus_pstar);  // modifiers: I; isVersionOf GO:0019076
    Release_of_the_virus_pstar = 94.025;
  Degradation_of_the_virus: V => ; compartment*Degradation_of_the_virus_k1*V;
    Degradation_of_the_virus_k1 = 3.3659;

  // Unit definitions:
  unit length = metre;
  unit area = metre^2;
  unit volume = 1e-3 litre;
  unit time = 86400 second;
  unit substance = mole;
end
