// SBML level 3 version 2

function mod__MA(k, inh, sub)
  k*inh*sub;
end
mod__MA is "mod. MA";

model Schaber2012SUP()
  // model units - substance: substance, time: time, volume: volume, area: area, length: length, extent: substance

  // Compartments:
  compartment compartment = 1 volume;

  // Species:
  species $S in compartment;
  species T in compartment = 1;
  species Tp in compartment = 0;

  // Assignment rules:
  S := exp(-0.5*time);
  TpFit := Tp/0.5;

  // Reactions:
  T____Tp__S: T => Tp; compartment*mod__MA(k, S, T); T____Tp__S is "T -> Tp; S";  // modifiers: S
    k = 0.1;
  Tp____T: Tp => T; compartment*k1*Tp; Tp____T is "Tp -> T";
    k1 = 0.1;

  // Unit definitions:
  unit length = metre;
  unit area = metre^2;
  unit volume = litre;
  unit time = second;
  unit substance = mole;
end
